*Heading
** Job name: AVWremesh_test Model name: model1
** Generated by: Abaqus/CAE 2016
*Preprint, echo=NO, model=NO, history=NO, contact=NO
**
** PARTS
**
*Part, name=OPAL325_ATFP
*Node
1,   18.4495735,   8.87388229,  -22.5602055
2,   51.7812004,  -30.5793228,   22.1485519
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*Element, type=T3D2
1,   1,   5
2,   5,   6
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*Nset, nset=_PickedSet5, internal, generate
1,  306,    1
*Elset, elset=_PickedSet5, internal, generate
1,  304,    1
*Nset, nset=_PickedSet7, internal, generate
1,  306,    1
*Elset, elset=_PickedSet7, internal, generate
1,  304,    1
** Section: ATPF-wire
*Solid Section, elset=_PickedSet5, material=ATFP_HYPER
1.,
*Nonstructural Mass, elset=_PickedSet7, units=TOTAL MASS
0.005,
*End Part
**
*Part, name=OPAL325_ATLA
*Node
1,   52.2790375,  -30.6023216,   22.4525356
2,    24.368988,  -8.03931236,  -27.3604107
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*Element, type=T3D2
1,   1,   5
2,   5,   6
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*Nset, nset=_PickedSet4, internal, generate
1,  1352,     1
*Elset, elset=_PickedSet4, internal, generate
1,  1350,     1
*Nset, nset=_PickedSet5, internal, generate
1,  1352,     1
*Elset, elset=_PickedSet5, internal, generate
1,  1350,     1
** Section: ATPF-wire
*Solid Section, elset=_PickedSet5, material=ATFP_HYPER
1.,
*Nonstructural Mass, elset=_PickedSet4, units=TOTAL MASS
0.005,
*End Part
**
*Part, name=OPAL325_AVW_v6
*Node
1,22.939378699999995,-9.384124785686655, 7.753372182870574
2,-23.477601999999997,-9.443811219100137, 9.395471891014516
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*Element, type=S4R
1,   1,  27, 180,  54
2,  27,  28, 181, 180
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*Node
271,           0.,           0.,           0.
*Nset, nset=_PickedSet13, internal, generate
1,  270,    1
*Elset, elset=_PickedSet13, internal, generate
1,  238,    1
*Nset, nset=_PickedSet33, internal
19,  20,  21,  22,  23,  24
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*Elset, elset=_PickedSet33, internal, generate
211,  238,    1
*Nset, nset=_PickedSet34, internal
1,   2,   3,   4,   5,   6
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*Elset, elset=_PickedSet34, internal, generate
1,  210,    1
*Nset, nset=_PickedSet35, internal, generate
1,  270,    1
*Elset, elset=_PickedSet35, internal, generate
1,  238,    1
** Section: AWP
*Shell Section, elset=_PickedSet34, material=AVW_HYPER_Analog, offset=SPOS
2., 5
** Section: AWP_dis
*Shell Section, elset=_PickedSet33, material=ATFP_HYPER_highdesity, offset=SPOS
2., 5
*Nonstructural Mass, elset=_PickedSet35, units=TOTAL MASS
0.02,
*End Part
**
*Part, name=OPAL325_CL_v6
*Node
1,-23.477601999999994,-9.443811219100137, 9.395471891014523
2,  -51.6031265,  -20.0011997,          66.0
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*Element, type=T3D2
1,   1,  25
2,  25,  26
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*Nset, nset=_PickedSet4, internal, generate
1,  24,   1
*Nset, nset=_PickedSet5, internal, generate
1,  1590,     1
*Elset, elset=_PickedSet5, internal, generate
1,  1578,     1
** Section: CL-wire
*Solid Section, elset=_PickedSet5, material=CL_Analog
1.,
*Element, type=ROTARYI, elset=_PickedSet4_Inertia-1_
1579, 1
1580, 2
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*Rotary Inertia, elset=_PickedSet4_Inertia-1_
0.0001, 0.0001, 0.0001, 0., 0., 0.
*End Part
**
*Part, name=OPAL325_GIfiller
*Node
1,-7.93228673999999,-54.81617555377506, -37.54916273538199
2,-16.49908639999999,-29.360297234248172, -36.3169730500772
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*Element, type=C3D4
1, 478, 479, 480, 481
2, 478, 482, 479, 481
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*Nset, nset=_PickedSet5, internal, generate
1,  867,    1
*Elset, elset=_PickedSet5, internal, generate
1,  3605,     1
*Nset, nset=_PickedSet6, internal, generate
1,  867,    1
*Elset, elset=_PickedSet6, internal, generate
1,  3605,     1
** Section: VAGFiller
*Solid Section, elset=_PickedSet6, material="AVW_HYPER20_low density"
1.,
*Nonstructural Mass, elset=_PickedSet5, units=TOTAL MASS
0.2,
*End Part
**
*Part, name=OPAL325_LA
*Node
1,-7.070252419999997,-52.32911534444249, -20.606909960565645
2,30.004299200000005,-8.57897261780372, -14.426245529527511
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*Element, type=S3R
1, 468, 381, 469
2, 565, 401, 386
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*Element, type=S4R
9, 229, 228, 241, 476
10, 228,  11,  12, 241
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*Nset, nset=_PickedSet20, internal
1,   5,   7,   8,  77,  78
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*Elset, elset=_PickedSet20, internal, generate
486,  602,    1
*Nset, nset=_PickedSet21, internal
1,   2,   8,   9,  11,  12
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*Elset, elset=_PickedSet21, internal, generate
603,  742,    1
*Nset, nset=_PickedSet22, internal
1,   5,   6,  77,  78,  79
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*Elset, elset=_PickedSet22, internal, generate
385,  485,    1
*Nset, nset=_PickedSet23, internal, generate
1,  1258,     1
*Elset, elset=_PickedSet23, internal, generate
1,  1203,     1
*Nset, nset=_PickedSet24, internal
1,    2,    3,    4,    6,   10
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*Elset, elset=_PickedSet24, internal
1,    2,    3,    4,    5,    6
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** Section: ICM
*Shell Section, elset=_PickedSet24, material=PCM_HYPER100
2., 5
** Section: PCM
*Shell Section, elset=_PickedSet22, material=PCM_Hyper_Analog
4., 5
** Section: PRMPCM
*Shell Section, elset=_PickedSet20, material=PCM_Hyper_Analog
6., 5
** Section: PRM
*Shell Section, elset=_PickedSet21, material=PCM_Hyper_Analog
2., 5
*Nonstructural Mass, elset=_PickedSet23, units=MASS PER VOLUME
1.1e-06,
*End Part
**
*Part, name=OPAL325_PBody
*Node
1,0.33558887200000653,-40.32356542409636, -39.235560968801074
2,-2.493659969999992,-37.447085849304244, -38.69243609729585
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*Element, type=S3R
1, 54, 30, 29
2, 51, 39, 38
*Element, type=S4R
3, 28, 29,  2,  3
4, 43, 49, 36, 42
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*Nset, nset=_PickedSet4, internal, generate
1,  54,   1
*Elset, elset=_PickedSet4, internal, generate
1,  41,   1
** Section: PBody
*Shell Section, elset=_PickedSet4, material=PARAVAG_H_highdensity
2., 5
*End Part
**
*Part, name=OPAL325_PM_mid
*Node
1,-56.10303500000001,-14.312455645637975, -27.199946857462866
2,-50.117321000000004,-16.229355513689686, -28.525443852635433
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*Element, type=S3R
1, 284,  87,  86
2, 208, 207, 196
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*Element, type=S4R
12,  77,  10,   1,  89
13,  96,  89,  88,  95
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*Nset, nset=_PickedSet4, internal, generate
1,  295,    1
*Elset, elset=_PickedSet4, internal, generate
1,  250,    1
** Section: PBody
*Shell Section, elset=_PickedSet4, material=PARAVAG_H_highdensity
2., 5
*End Part
**
*Part, name=OPAL325_Para_v6
*Node
      1,  -25.8009739,   11.8042965,   -22.4799175
      2,-20.843028999999998,-2.008838544658774, -10.518373949575132
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*Element, type=T3D2
1,  1, 18
2, 18, 19
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*Nset, nset=_PickedSet4, internal, generate
1,  17,   1
*Nset, nset=_PickedSet13, internal
1,   2,   3,   6,   7,   8
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*Elset, elset=_PickedSet13, internal
1,   2,   3,   4,   5,   6
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*Nset, nset=_PickedSet14, internal
1,   3,   4,   5,   7,  12
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*Elset, elset=_PickedSet14, internal
43,  44,  45,  46,  47,  48
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** Section: Para-wire
*Solid Section, elset=_PickedSet13, material=PARAVAG_H_Analog
1.,
** Section: Para-wire-high
*Solid Section, elset=_PickedSet14, material=ATFP_HYPER
1.,
*Element, type=ROTARYI, elset=_PickedSet4_Inertia-1_
333, 1
334, 2
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*Rotary Inertia, elset=_PickedSet4_Inertia-1_
0.0001, 0.0001, 0.0001, 0., 0., 0.
*End Part
**
*Part, name=OPAL325_US_v6
*Node
1,-23.477601999999997,-9.443811219100134, 9.395471891014516
2,  -42.9855118,  -48.8706436,    30.1705265
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*Element, type=T3D2
1,   1,  13
2,  13,  14
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*Nset, nset=_PickedSet4, internal, generate
1,  12,   1
*Nset, nset=_PickedSet5, internal, generate
1,  567,    1
*Elset, elset=_PickedSet5, internal, generate
1,  561,    1
** Section: US-wire
*Solid Section, elset=_PickedSet5, material=US_Analog
1.,
*Element, type=ROTARYI, elset=_PickedSet4_Inertia-1_
562, 1
563, 2
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*Rotary Inertia, elset=_PickedSet4_Inertia-1_
0.0001, 0.0001, 0.0001, 0., 0., 0.
*End Part
**
*Part, name=OPAL325_refPlane_0318_2011
*Node
1,  -59.0564117,  -16.7335472,  -27.1485138
2,   46.1918221,  -16.7335472,  -29.2845459
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*Element, type=S4R
1, 26, 50, 51, 25
2, 40, 22, 23, 41
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*End Part
**
**
** ASSEMBLY
**
*Assembly, name=Assembly
**
*Instance, name=OPAL325_ATFP-1, part=OPAL325_ATFP
*End Instance
**
*Instance, name=OPAL325_GIfiller-1, part=OPAL325_GIfiller
*End Instance
**
*Instance, name=OPAL325_LA-1, part=OPAL325_LA
*End Instance
**
*Instance, name=OPAL325_ATLA-1, part=OPAL325_ATLA
*End Instance
**
*Instance, name=OPAL325_CL_v6-1, part=OPAL325_CL_v6
*End Instance
**
*Instance, name=OPAL325_Para_v6-1, part=OPAL325_Para_v6
*End Instance
**
*Instance, name=OPAL325_AVW_v6-1, part=OPAL325_AVW_v6
*End Instance
**
*Instance, name=OPAL325_US_v6-1, part=OPAL325_US_v6
*End Instance
**
*Instance, name=OPAL325_PBody-1, part=OPAL325_PBody
*End Instance
**
*Instance, name=OPAL325_PM_mid-1, part=OPAL325_PM_mid
*End Instance
**
**Instance, name=OPAL325_refPlane_0318_2011-1, part=OPAL325_refPlane_0318_2011
**End Instance
**
*Element, type=CONN3D2
1, OPAL325_AVW_v6-1.11, OPAL325_Para_v6-1.8
2, OPAL325_AVW_v6-1.12, OPAL325_Para_v6-1.2
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*Connector Section, elset=Wire-1-Set-1
Weld,
*Element, type=CONN3D2
13, OPAL325_AVW_v6-1.2, OPAL325_CL_v6-1.1
14, OPAL325_AVW_v6-1.5, OPAL325_CL_v6-1.16
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*Connector Section, elset=Wire-2-Set-1
Weld,
*Nset, nset=AVW, instance=OPAL325_AVW_v6-1, generate
1,  270,    1
*Elset, elset=AVW, instance=OPAL325_AVW_v6-1, generate
1,  238,    1
*Nset, nset=Wire-1-Set-1, instance=OPAL325_AVW_v6-1
11, 12, 13, 14, 15, 16, 17, 18, 19, 20, 21, 26
*Nset, nset=Wire-1-Set-1, instance=OPAL325_Para_v6-1
2,  4,  5,  6,  8,  9, 10, 11, 12, 13, 15, 17
*Elset, elset=Wire-1-Set-1, generate
1,  12,   1
*Nset, nset=Wire-2-Set-1, instance=OPAL325_AVW_v6-1, generate
1,  12,   1
*Nset, nset=Wire-2-Set-1, instance=OPAL325_CL_v6-1
1,  3,  5,  8, 10, 12, 14, 16, 18, 19, 21, 23
*Nset, nset=Wire-2-Set-1, instance=OPAL325_US_v6-1, generate
1,  11,   2
*Elset, elset=Wire-2-Set-1, generate
13,  30,   1
*Nset, nset=_PickedSet487, internal, instance=OPAL325_ATFP-1
2, 4
*Nset, nset=_PickedSet487, internal, instance=OPAL325_ATLA-1
2, 4
*Nset, nset=_PickedSet542, internal, instance=OPAL325_CL_v6-1
2,  4,  6,  7,  9, 11, 13, 15, 17, 20, 22, 24
*Nset, nset=_PickedSet542, internal, instance=OPAL325_US_v6-1, generate
2,  12,   2
*Nset, nset=_PickedSet545, internal, instance=OPAL325_ATFP-1
1, 3
*Nset, nset=_PickedSet545, internal, instance=OPAL325_Para_v6-1
1,  3,  7, 14, 16
*Elset, elset=_PickedSet545, internal, instance=OPAL325_Para_v6-1
43, 308
*Nset, nset=_PickedSet575, internal, instance=OPAL325_LA-1
3,   4,  10,  41,  42,  43
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*Elset, elset=_PickedSet575, internal, instance=OPAL325_LA-1
20,   33,   87,   88,   89,   92
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*Nset, nset=_PickedSet576, internal, instance=OPAL325_LA-1
5,   6, 121, 122, 123, 124, 125, 126, 127, 128, 129
*Elset, elset=_PickedSet576, internal, instance=OPAL325_LA-1
415, 419, 420, 425, 431, 435, 436, 437, 439, 440
*Nset, nset=_PickedSet582, internal, instance=OPAL325_LA-1
5,   7, 130, 131, 132, 133, 134
*Elset, elset=_PickedSet582, internal, instance=OPAL325_LA-1
518, 519, 521, 527, 597, 598
*Nset, nset=_PickedSet585, internal, instance=OPAL325_PBody-1
6,  7,  8,  9, 10, 11, 12, 20, 21, 22, 23, 24
*Elset, elset=_PickedSet585, internal, instance=OPAL325_PBody-1
5, 12, 13, 14, 15, 16, 27, 28, 29, 37
*Nset, nset=_PickedSet586, internal, instance=OPAL325_ATLA-1, generate
1,  4,  1
*Nset, nset=_PickedSet596, internal, instance=OPAL325_ATLA-1
1,   2,   5,   6,   7,   8
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*Elset, elset=_PickedSet596, internal, instance=OPAL325_ATLA-1, generate
1,  661,    1
*Nset, nset=_PickedSet597, internal, instance=OPAL325_ATLA-1
3,    4,  665,  666,  667,  668
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*Nset, nset=_PickedSet637, internal, instance=OPAL325_PM_mid-1
11,  12,  13,  14,  15,  16
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*Elset, elset=_PickedSet637, internal, instance=OPAL325_PM_mid-1
19,  20,  22,  23,  47,  48
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*Nset, nset=_PickedSet638, internal, instance=OPAL325_PBody-1
6,  7,  8,  9, 10, 11, 12, 20, 21, 22, 23, 24
*Elset, elset=_PickedSet638, internal, instance=OPAL325_PBody-1
5, 12, 13, 14, 15, 16, 27, 28, 29, 37
*Nset, nset=_PickedSet639, internal, instance=OPAL325_PM_mid-1
10,  46,  47,  48,  49,  50
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*Elset, elset=_PickedSet639, internal, instance=OPAL325_PM_mid-1
12,  27,  28,  29,  44,  45
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*Elset, elset=__PickedSurf544_SPOS, internal, instance=OPAL325_AVW_v6-1, generate
1,  238,    1
*Surface, type=ELEMENT, name=_PickedSurf544, internal
__PickedSurf544_SPOS, SPOS
*Elset, elset=__PickedSurf571_SNEG, internal, instance=OPAL325_PBody-1, generate
1,  41,   1
*Surface, type=ELEMENT, name=_PickedSurf571, internal
__PickedSurf571_SNEG, SNEG
*Elset, elset=__PickedSurf572_S3, internal, instance=OPAL325_GIfiller-1
138,  139,  690,  735,  947,  960
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*Elset, elset=__PickedSurf572_S2, internal, instance=OPAL325_GIfiller-1
462, 1055, 1635, 1651, 1788, 1828, 1854, 2391, 2830, 3049, 3318, 3343, 3572, 3591, 3595, 3596
*Elset, elset=__PickedSurf572_S1, internal, instance=OPAL325_GIfiller-1
1164, 1178, 2919, 3538
*Elset, elset=__PickedSurf572_S4, internal, instance=OPAL325_GIfiller-1
1779, 1890, 2052, 2538, 2741, 3012, 3055, 3101, 3126, 3314, 3448
*Surface, type=ELEMENT, name=_PickedSurf572, internal
__PickedSurf572_S3, S3
__PickedSurf572_S2, S2
__PickedSurf572_S4, S4
__PickedSurf572_S1, S1
*Elset, elset=__PickedSurf583_SPOS, internal, instance=OPAL325_LA-1, generate
486,  602,    1
*Elset, elset=__PickedSurf583_SNEG, internal, instance=OPAL325_LA-1, generate
486,  742,    1
*Surface, type=ELEMENT, name=_PickedSurf583, internal
__PickedSurf583_SPOS, SPOS
__PickedSurf583_SNEG, SNEG
*Elset, elset=__PickedSurf587_SNEG, internal, instance=OPAL325_LA-1
1,   2,   3,   4,   5,   6
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*Surface, type=ELEMENT, name=_PickedSurf587, internal
__PickedSurf587_SNEG, SNEG
*Elset, elset=__PickedSurf591_SPOS, internal, instance=OPAL325_LA-1
385,  386,  387,  388,  389,  390
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*Surface, type=ELEMENT, name=_PickedSurf591, internal
__PickedSurf591_SPOS, SPOS
*Elset, elset=__PickedSurf644_SNEG, internal, instance=OPAL325_AVW_v6-1, generate
1,  238,    1
*Surface, type=ELEMENT, name=_PickedSurf644, internal
__PickedSurf644_SNEG, SNEG
*Elset, elset=__PickedSurf645_S3, internal, instance=OPAL325_GIfiller-1
21,   28,   73,  102,  122,  140
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*Elset, elset=__PickedSurf645_S4, internal, instance=OPAL325_GIfiller-1
242,  265,  322,  325,  605,  615
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*Elset, elset=__PickedSurf645_S2, internal, instance=OPAL325_GIfiller-1
15,  403,  917, 1130, 1552, 2034
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*Elset, elset=__PickedSurf645_S1, internal, instance=OPAL325_GIfiller-1
46,  462,  723,  853, 1039, 1045
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*Surface, type=ELEMENT, name=_PickedSurf645, internal
__PickedSurf645_S3, S3
__PickedSurf645_S4, S4
__PickedSurf645_S2, S2
__PickedSurf645_S1, S1
*Elset, elset=__PickedSurf646_SPOS, internal, instance=OPAL325_LA-1, generate
1,  1203,     1
*Surface, type=ELEMENT, name=_PickedSurf646, internal
__PickedSurf646_SPOS, SPOS
*Elset, elset=__PickedSurf647_S3, internal, instance=OPAL325_GIfiller-1
21,   28,   73,  102,  122,  140
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*Elset, elset=__PickedSurf647_S4, internal, instance=OPAL325_GIfiller-1
242,  265,  322,  325,  605,  615
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*Elset, elset=__PickedSurf647_S2, internal, instance=OPAL325_GIfiller-1
15,  403,  917, 1130, 1552, 2034
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*Elset, elset=__PickedSurf647_S1, internal, instance=OPAL325_GIfiller-1
46,  462,  723,  853, 1039, 1045
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*Surface, type=ELEMENT, name=_PickedSurf647, internal
__PickedSurf647_S3, S3
__PickedSurf647_S4, S4
__PickedSurf647_S2, S2
__PickedSurf647_S1, S1
*Elset, elset=__PickedSurf648_SPOS, internal, instance=OPAL325_AVW_v6-1, generate
1,  238,    1
*Surface, type=ELEMENT, name=_PickedSurf648, internal
__PickedSurf648_SPOS, SPOS
*Surface, type=NODE, name=_PickedSet597_CNS_, internal
_PickedSet597, 1.
*Surface, type=NODE, name=_PickedSet596_CNS_, internal
_PickedSet596, 1.
*Surface, type=NODE, name=_PickedSet585_CNS_, internal
_PickedSet585, 1.
*Surface, type=NODE, name=_PickedSet637_CNS_, internal
_PickedSet637, 1.
*Surface, type=NODE, name=_PickedSet638_CNS_, internal
_PickedSet638, 1.
*Orientation, name="Datum csys-1"
1.,           0.,           0.,           0.,           1.,           0.
1, 0.
** Constraint: ATLA-N_LA-tie
*Tie, name=ATLA-N_LA-tie, adjust=no, position tolerance=40., type=NODE TO SURFACE
_PickedSet597_CNS_, _PickedSurf591
** Constraint: ATLA_D_LA-tie
*Tie, name=ATLA_D_LA-tie, adjust=no, position tolerance=40., type=NODE TO SURFACE
_PickedSet596_CNS_, _PickedSurf587
** Constraint: PBody-LA-Tie
*Tie, name=PBody-LA-Tie, adjust=no, position tolerance=20., type=NODE TO SURFACE
_PickedSet585_CNS_, _PickedSurf583
** Constraint: PM-PBody
*Tie, name=PM-PBody, adjust=no
_PickedSet638_CNS_, _PickedSet637_CNS_
** Constraint: Refplane
**Display Body, instance=OPAL325_refPlane_0318_2011-1
*End Assembly
*Amplitude, name=AMP-1, definition=SMOOTH STEP
0.,              0.,             0.1,            0.33,             0.2,            0.61,             0.3,            0.83
0.4,            0.96,             0.5,              1.
*Amplitude, name=AMP-2, time=TOTAL TIME
0.,              0.,            0.05,            0.08,             0.1,            0.15,            0.15,            0.23
0.2,             0.3,            0.25,            0.38,             0.3,            0.45,            0.35,            0.52
0.4,            0.58,            0.45,            0.64,             0.5,             0.7,            0.55,            0.76
0.6,             0.8,            0.65,            0.85,             0.7,            0.89,            0.75,            0.92
0.8,            0.95,            0.85,            0.97,             0.9,            0.99,              1.,              1.
*Amplitude, name=AMP-3
0.,              0.,           0.025,            0.08,            0.05,            0.15,           0.075,            0.23
0.1,             0.3,           0.125,            0.38,            0.15,            0.45,           0.175,            0.52
0.2,            0.58,           0.225,            0.64,            0.25,             0.7,           0.275,            0.76
0.3,             0.8,           0.325,            0.85,            0.35,            0.89,           0.375,            0.92
0.4,            0.95,           0.425,            0.97,            0.45,            0.99,             0.5,              1.
*Amplitude, name=AMP-4
0.,              0.,          0.0125,            0.08,           0.025,            0.15,          0.0375,            0.23
0.05,             0.3,          0.0625,            0.38,           0.075,            0.45,          0.0875,            0.52
0.1,            0.58,          0.1125,            0.64,           0.125,             0.7,          0.1375,            0.76
0.15,             0.8,          0.1625,            0.85,           0.175,            0.89,          0.1875,            0.92
0.2,            0.95,          0.2125,            0.97,           0.225,            0.99,            0.25,              1.
*Amplitude, name="active contraction"
0.,              0.,            0.05,              0.,             0.1,              0.,            0.15,              0.
0.2,              0.,            0.25,              0.,             0.3,              0.,            0.35,              0.
0.4,              0.,            0.45,              0.,             0.5,              0.,            0.55,            0.76
0.6,             0.8,            0.65,            0.85,             0.7,            0.89,            0.75,            0.92
0.8,            0.95,            0.85,            0.97,             0.9,            0.99,              1.,              1.
*Amplitude, name="active contraction-all time"
0.,              0.,            0.05,            0.08,             0.1,            0.15,            0.15,            0.23
0.2,             0.3,            0.25,            0.38,             0.3,            0.45,            0.35,            0.52
0.4,            0.58,            0.45,            0.64,             0.5,             0.7,            0.55,            0.76
0.6,             0.8,            0.65,            0.85,             0.7,            0.89,            0.75,            0.92
0.8,            0.95,            0.85,            0.97,             0.9,            0.99,              1.,              1.
*Amplitude, name="smooth step", definition=SMOOTH STEP
0.,              0.,            0.05,            0.08,             0.1,            0.15,            0.15,            0.23
0.2,             0.3,            0.25,            0.38,             0.3,            0.45,            0.35,            0.52
0.4,            0.58,            0.45,            0.64,             0.5,             0.7,            0.55,            0.76
0.6,             0.8,            0.65,            0.85,             0.7,            0.89,            0.75,            0.92
0.8,            0.95,            0.85,            0.97,             0.9,            0.99,              1.,              1.
**
** MATERIALS
**
*Material, name=CL_Analog
*Density
 9e-07,
*Hyperelastic, n=2, test data input
*Uniaxial Test Data
0, 0.001
0.02, 0.1
0.04, 0.2
0.09231359943722175, 0.3
0.1640548714505522, 0.4
0.25748988953351354, 0.5
0.3791785965175595, 0.6
0.5376645873087982, 0.7
0.7440749425058866, 0.8
1.0129014461679087, 0.9
1.3630180315604374, 1.0
1e-05, -0.1
1e-05, -0.2
1e-05, -0.3
1e-05, -0.4
1e-05, -0.5
1e-05, -0.6
1e-05, -0.7
1e-05, -0.8
1e-05, -0.9
*Material, name=US_Analog
*Density
 9e-07,
*Hyperelastic, n=2, test data input
*Uniaxial Test Data
0, 0.001
0.02, 0.1
0.04, 0.2
0.06, 0.3
0.08, 0.4
0.11751515686952164, 0.5
0.16753853623712606, 0.6
0.22496415245402723, 0.7
0.29088735641535723, 0.8
0.36656558250463683, 0.9
0.45344233512793425, 1.0
1e-05, -0.1
1e-05, -0.2
1e-05, -0.3
1e-05, -0.4
1e-05, -0.5
1e-05, -0.6
1e-05, -0.7
1e-05, -0.8
1e-05, -0.9
*Material, name=PCM_Hyper_Analog
*Density
 1.1e-06,
*Hyperelastic, n=2, test data input
*Uniaxial Test Data
0.0138501, 0.1
0.0318666, 0.2
0.055303, 0.3
0.0857897, 0.4
0.125448, 0.5
0.17703600000000003, 0.6
0.244143, 0.7
0.331437, 0.8
0.444993, 0.9
0.592708, 1.0
*Material, name=PARAVAG_H_Analog
*Density
 9e-07,
*Hyperelastic, n=2, test data input
*Uniaxial Test Data
0, 0.001
0.02, 0.1
0.04, 0.2
0.09231359943722175, 0.3
0.1640548714505522, 0.4
0.25748988953351354, 0.5
0.3791785965175595, 0.6
0.5376645873087982, 0.7
0.7440749425058866, 0.8
1.0129014461679087, 0.9
1.3630180315604374, 1.0
1e-05, -0.1
1e-05, -0.2
1e-05, -0.3
1e-05, -0.4
1e-05, -0.5
1e-05, -0.6
1e-05, -0.7
1e-05, -0.8
1e-05, -0.9
*Material, name=AVW_HYPER_Analog
*Density
 1.1e-06,
*Hyperelastic, n=2, test data input
*Uniaxial Test Data
0.0138501, 0.1
0.0318666, 0.2
0.055303, 0.3
0.0857897, 0.4
0.125448, 0.5
0.17703600000000003, 0.6
0.244143, 0.7
0.331437, 0.8
0.444993, 0.9
0.592708, 1.0
1e-05, -0.1
1e-05, -0.2
1e-05, -0.3
1e-05, -0.4
1e-05, -0.5
1e-05, -0.6
1e-05, -0.7
1e-05, -0.8
1e-05, -0.9
*Material, name=ICM_HYPER_Analog
*Density
 1.1e-06,
*Hyperelastic, n=2, test data input
*Uniaxial Test Data
0.0138501, 0.1
0.0318666, 0.2
0.055303, 0.3
0.0857897, 0.4
0.125448, 0.5
0.17703600000000003, 0.6
0.244143, 0.7
0.331437, 0.8
0.444993, 0.9
0.592708, 1.0
*Material, name=PRM_HYPER_Analog
*Density
 1.1e-06,
*Hyperelastic, n=2, test data input
*Uniaxial Test Data
0.0138501, 0.1
0.0318666, 0.2
0.055303, 0.3
0.0857897, 0.4
0.125448, 0.5
0.17703600000000003, 0.6
0.244143, 0.7
0.331437, 0.8
0.444993, 0.9
0.592708, 1.0
*Material, name=Pbody_Analog
*Density
 9e-07,
*Hyperelastic, n=2, test data input
*Uniaxial Test Data
0.0268578, 0.1
0.00268578, 0.2
0.0055405, 0.3
0.00857478, 0.4
0.0117999, 0.5
0.0152279, 0.6
0.0188715, 0.7
0.0227443, 0.8
0.0268606, 0.9
0.0312359, 1.0
*Material, name=PM_mid_Analog
*Density
 9e-07,
*Hyperelastic, n=2, test data input
*Uniaxial Test Data
0.0268578, 0.1
0.00268578, 0.2
0.0055405, 0.3
0.00857478, 0.4
0.0117999, 0.5
0.0152279, 0.6
0.0188715, 0.7
0.0227443, 0.8
0.0268606, 0.9
0.0312359, 1.0
*Material, name=PARAVAG_dis_HYPER_Analog
*Density
 1.1e-05,
*Hyperelastic, n=2, test data input
*Uniaxial Test Data
0.1, 0.1
3.18666, 0.2
5.5303, 0.3
8.57895, 0.4
12.5448, 0.5
17.7036, 0.6
24.414300000000004, 0.7
33.1437, 0.8
44.49929999999999, 0.9
59.271, 1.0
*Material, name=AWP_dis_HYPER_highdensity_Analog
*Density
 1.1e-04,
*Hyperelastic, n=2, test data input
*Uniaxial Test Data
0.1, 0.1
3.18666, 0.2
5.5303, 0.3
8.57895, 0.4
12.5448, 0.5
17.7036, 0.6
24.414300000000004, 0.7
33.1437, 0.8
44.49929999999999, 0.9
59.271, 1.0
*Material, name=ATFP_HYPER
*Density
1.1e-05,
*Hyperelastic, n=2, test data input
*Uniaxial Test Data
1.38501, 0.1
3.18666, 0.2
5.5303, 0.3
8.57895, 0.4
12.5448, 0.5
17.7036, 0.6
24.4143, 0.7
33.1437, 0.8
44.4993, 0.9
59.271,  1.
*Material, name=ATFP_HYPER_highdesity
*Density
0.00011,
*Hyperelastic, n=2, test data input
*Uniaxial Test Data
1.38501, 0.1
3.18666, 0.2
5.5303, 0.3
8.57895, 0.4
12.5448, 0.5
17.7036, 0.6
24.4143, 0.7
33.1437, 0.8
44.4993, 0.9
59.271,  1.
*Material, name=AVW_HYPER
*Density
1.1e-06,
*Hyperelastic, n=2, test data input
*Uniaxial Test Data
0.0138501, 0.1
0.0318666, 0.2
0.055303, 0.3
0.0857897, 0.4
0.125448, 0.5
0.177036, 0.6
0.244143, 0.7
0.331437, 0.8
0.444993, 0.9
0.592708,  1.
*Material, name="AVW_HYPER20_low density"
*Density
1.1e-07,
*Hyperelastic, n=2, test data input
*Uniaxial Test Data
0.00138501, 0.1
0.00318666, 0.2
0.0055303, 0.3
0.00857897, 0.4
0.0125448, 0.5
0.0177036, 0.6
0.0244143, 0.7
0.0331437, 0.8
0.0444993, 0.9
0.0592708,  1.
*Material, name=CLUS_H1
*Density
9e-07,
*Hyperelastic, n=2, test data input
*Uniaxial Test Data
2.68578e-05,  0.1
5.5405e-05,  0.2
8.57477e-05,  0.3
0.000117999,  0.4
0.000152279,  0.5
0.000188715,  0.6
0.000227443,  0.7
0.000268606,  0.8
0.000312359,  0.9
0.000358864,   1.
-1e-06, -0.1
-1e-06, -0.2
-1e-06, -0.3
-1e-06, -0.4
-1e-06, -0.5
-1e-06, -0.6
-1e-06, -0.7
-1e-06, -0.8
-1e-06, -0.9
*Material, name=CLUS_H5
*Density
9e-07,
*Hyperelastic, n=2, test data input
*Uniaxial Test Data
0.000134289, 0.1
0.000277025, 0.2
0.000428739, 0.3
0.000589995, 0.4
0.000761395, 0.5
0.000943575, 0.6
0.00113722, 0.7
0.00134303, 0.8
0.00156179, 0.9
0.00179432,  1.
*Material, name=CLUS_H10
*Density
9e-07,
*Hyperelastic, n=2, test data input
*Uniaxial Test Data
0.000268578,  0.1
0.00055405,  0.2
0.000857477,  0.3
0.00117999,  0.4
0.00152279,  0.5
0.00188715,  0.6
0.00227443,  0.7
0.00268606,  0.8
0.00312359,  0.9
0.00358864,   1.

*Material, name=CLUS_H50
*Density
9e-07,
*Hyperelastic, n=2, test data input
*Uniaxial Test Data
0.00134289, 0.1
0.00277025, 0.2
0.00428739, 0.3
0.00589995, 0.4
0.00761395, 0.5
0.00943575, 0.6
0.0113721, 0.7
0.0134303, 0.8
0.015618, 0.9
0.0179432,  1.
*Material, name=CLUS_H100
*Density
9e-07,
*Hyperelastic, n=2, test data input
*Uniaxial Test Data
0.00268578,  0.1
0.0055405,  0.2
0.00857477,  0.3
0.0117999,  0.4
0.0152279,  0.5
0.0188715,  0.6
0.0227443,  0.7
0.0268606,  0.8
0.0312359,  0.9
0.0358864,   1.
1e-05, -0.1
1e-05, -0.2
1e-05, -0.3
1e-05, -0.4
1e-05, -0.5
1e-05, -0.6
1e-05, -0.7
1e-05, -0.8
1e-05, -0.9
*Material, name=PARAVAG_H
*Density
9e-07,
*Hyperelastic, n=2, test data input
*Uniaxial Test Data
0.00268578,  0.1
0.000268578,  0.2
0.00055405,  0.3
0.000857478,  0.4
0.00117999,  0.5
0.00152279,  0.6
0.00188715,  0.7
0.00227443,  0.8
0.00268606,  0.9
0.00312359,   1.
1e-05, -0.1
1e-05, -0.2
1e-05, -0.3
1e-05, -0.4
1e-05, -0.5
1e-05, -0.6
1e-05, -0.7
1e-05, -0.8
1e-05, -0.9
*Material, name=PARAVAG_H_highdensity
*Density
9e-07,
*Hyperelastic, n=2, test data input
*Uniaxial Test Data
0.0268578,  0.1
0.00268578,  0.2
0.0055405,  0.3
0.00857478,  0.4
0.0117999,  0.5
0.0152279,  0.6
0.0188715,  0.7
0.0227443,  0.8
0.0268606,  0.9
0.0312359,   1.
1e-05, -0.1
1e-05, -0.2
1e-05, -0.3
1e-05, -0.4
1e-05, -0.5
1e-05, -0.6
1e-05, -0.7
1e-05, -0.8
1e-05, -0.9
*Material, name=PCM_HYPER10
*Density
1.1e-06,
*Hyperelastic, n=2, test data input
*Uniaxial Test Data
0.0014, 0.1
0.0032, 0.2
0.0055, 0.3
0.0086, 0.4
0.0125, 0.5
0.0177, 0.6
0.0244, 0.7
0.0331, 0.8
0.0445, 0.9
0.06,  1.
*Material, name=PCM_HYPER20
*Density
1.1e-06,
*Hyperelastic, n=2, test data input
*Uniaxial Test Data
0.00277002, 0.1
0.00637332, 0.2
0.0110606, 0.3
0.0171579, 0.4
0.0250896, 0.5
0.0354072, 0.6
0.0488286, 0.7
0.0662874, 0.8
0.0889986, 0.9
0.118542,  1.
*Material, name=PCM_HYPER40
*Density
1.1e-06,
*Hyperelastic, n=2, test data input
*Uniaxial Test Data
0.00554004, 0.1
0.0127466, 0.2
0.0221212, 0.3
0.0343159, 0.4
0.0501792, 0.5
0.0708144, 0.6
0.0976572, 0.7
0.132575, 0.8
0.177997, 0.9
0.237083,  1.
*Material, name=PCM_HYPER60
*Density
1.1e-06,
*Hyperelastic, n=2, test data input
*Uniaxial Test Data
0.00831006, 0.1
0.01912, 0.2
0.0331818, 0.3
0.0514738, 0.4
0.0752688, 0.5
0.106222, 0.6
0.146486, 0.7
0.198862, 0.8
0.266996, 0.9
0.355625,  1.
*Material, name=PCM_HYPER80
*Density
1.1e-06,
*Hyperelastic, n=2, test data input
*Uniaxial Test Data
0.0110801, 0.1
0.0254933, 0.2
0.0442424, 0.3
0.0686318, 0.4
0.100358, 0.5
0.141629, 0.6
0.195314, 0.7
0.26515, 0.8
0.355994, 0.9
0.474166,  1.
*Material, name=PCM_HYPER100
*Density
1.1e-06,
*Hyperelastic, n=2, test data input
*Uniaxial Test Data
0.0138501, 0.1
0.0318666, 0.2
0.055303, 0.3
0.0857897, 0.4
0.125448, 0.5
0.177036, 0.6
0.244143, 0.7
0.331437, 0.8
0.444993, 0.9
0.592708,  1.
*Material, name=PCM_HYPER300
*Density
1.1e-06,
*Hyperelastic, n=2, test data input
*Uniaxial Test Data
0.0415503, 0.1
0.0955998, 0.2
0.165909, 0.3
0.257369, 0.4
0.376344, 0.5
0.531108, 0.6
0.732429, 0.7
0.994311, 0.8
1.33498, 0.9
1.77812,  1.
**
** INTERACTION PROPERTIES
**
*Surface Interaction, name=frictionless
*Friction
0.,
*Surface Interaction, name=Penalty
*Friction
1.,
*Surface Interaction, name=rough
*Friction, rough
**
** BOUNDARY CONDITIONS
**
** Name: ATFP_Fix Type: Symmetry/Antisymmetry/Encastre
*Boundary
_PickedSet545, PINNED
** Name: ATFPbackends Type: Symmetry/Antisymmetry/Encastre
*Boundary
_PickedSet487, PINNED
** Name: ATLA_Fix Type: Symmetry/Antisymmetry/Encastre
*Boundary
_PickedSet586, PINNED
** Name: CL&US Type: Symmetry/Antisymmetry/Encastre
*Boundary
_PickedSet542, PINNED
** Name: LA-PBfix Type: Symmetry/Antisymmetry/Encastre
*Boundary
_PickedSet576, PINNED
** Name: LAposterior Type: Symmetry/Antisymmetry/Encastre
*Boundary
_PickedSet575, PINNED
** Name: PM Type: Displacement/Rotation
*Boundary
_PickedSet639, 1, 1
_PickedSet639, 2, 2
_PickedSet639, 3, 3
_PickedSet639, 4, 4
_PickedSet639, 5, 5
_PickedSet639, 6, 6
**
** INTERACTIONS
**
** Interaction: Self-Contact
*Contact, op=NEW
*Contact Inclusions, ALL EXTERIOR
*Contact Property Assignment
,  , frictionless
** ----------------------------------------------------------------
**
** STEP: Step-1
**
*Step, name=Step-1, nlgeom=YES
*Dynamic, Explicit
, 1.,, 0.1
*Bulk Viscosity
0.06, 1.2
**
** BOUNDARY CONDITIONS
**
** Name: LA-PM Type: Symmetry/Antisymmetry/Encastre
*Boundary
_PickedSet582, PINNED
**
** LOADS
**
** Name: pressure   Type: Pressure
*Dsload, amplitude="smooth step"
_PickedSurf648, P, 0.01
** Name: traction   Type: Surface traction
*Dsload, amplitude=AMP-4, orientation="Datum csys-1"
_PickedSurf544, TRVEC, 5e-05, 0., 0., -1.
**
** INTERACTIONS
**
** Interaction: AVW-Filler-Contact
*Contact Pair, interaction=frictionless, mechanical constraint=KINEMATIC, cpset=AVW-Filler-Contact
_PickedSurf644, _PickedSurf645
** Interaction: Filler-LA-Contact
*Contact Pair, interaction=Penalty, mechanical constraint=KINEMATIC, cpset=Filler-LA-Contact
_PickedSurf646, _PickedSurf647
** Interaction: Filler-PBody
*Contact Pair, interaction=rough, mechanical constraint=KINEMATIC, cpset=Filler-PBody
_PickedSurf571, _PickedSurf572
**
** OUTPUT REQUESTS
**
*Restart, write, number interval=1, time marks=NO
**
** FIELD OUTPUT: F-Output-1
**
*Output, field, number interval=10
*Node Output
A, COORD, RF, U, V
*Element Output, directions=YES
ELEDEN, ELEN, ENER, EVOL, LE, S
**
** HISTORY OUTPUT: AVWOut
**
*Output, history
*Node Output, nset=AVW
U1, U2, U3
**
** HISTORY OUTPUT: H-Output-1
**
*Output, history, variable=PRESELECT
*End Step
