*Heading
** Job name: Normal_2_withoutPMLAtie Model name: model1
** Generated by: Abaqus/CAE 2016
*Preprint, echo=NO, model=NO, history=NO, contact=NO
**
** PARTS
**
*Part, name=OPAL325_ATFP
*Node
1,   18.4495735,   8.87388229,  -22.5602055
2,   51.7812004,  -30.5793228,   22.1485519
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*Element, type=T3D2
1,   1,   5
2,   5,   6
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*Nset, nset=_PickedSet5, internal, generate
1,  306,    1
*Elset, elset=_PickedSet5, internal, generate
1,  304,    1
*Nset, nset=_PickedSet7, internal, generate
1,  306,    1
*Elset, elset=_PickedSet7, internal, generate
1,  304,    1
** Section: ATPF-wire
*Solid Section, elset=_PickedSet5, material=ATFP_HYPER
1.,
*Nonstructural Mass, elset=_PickedSet7, units=TOTAL MASS
0.005,
*End Part
**
*Part, name=OPAL325_ATLA
*Node
1,  -66.2551956,  -30.5507946,   22.3432255
2,  -46.6685181,   30.0492096,   1.58248425
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*Element, type=T3D2
1,    1,    5
2,    5,    6
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*Nset, nset=_PickedSet5, internal, generate
1,  2756,     1
*Elset, elset=_PickedSet5, internal, generate
1,  2754,     1
*Nset, nset=_PickedSet7, internal, generate
1,  2756,     1
*Elset, elset=_PickedSet7, internal, generate
1,  2754,     1
** Section: ATPF-wire
*Solid Section, elset=_PickedSet5, material=ATFP_HYPER
1.,
*Nonstructural Mass, elset=_PickedSet7, units=TOTAL MASS
0.005,
*End Part
**
*Part, name=OPAL325_AVW_v6
*Node
1,   22.9393787,  -9.06633091,   11.6914644
2,   -23.477602,   -9.2332077,   13.4487724
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*Element, type=S4R
1,   4,  58, 193,  57
2,  58,   1,  27, 193
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*Node
310,           0.,           0.,           0.
*Nset, nset=_PickedSet222, internal, generate
 32,  33,  34,  35,  36,  37,  48,  49,  50,  51,  52,  65,  66,  67,  68,  69
 81,  82,  83,  84,  85,  96,  97,  98,  99, 100, 111, 112, 113, 114, 115, 116
126, 127, 128, 129, 130, 141, 142, 143, 144, 145, 155, 156, 157, 158, 159, 160
186, 189, 194, 195, 196, 204, 205, 206, 207, 208, 209, 217, 218, 219, 221, 226
230, 231, 232, 233, 239, 248, 250, 252, 253, 254, 255, 260, 261, 262, 263, 264
271, 272, 274, 275, 276, 283, 284, 285, 286, 291, 296, 297, 298, 299, 300
*Nset, nset=_PickedSet222, internal, generate
32,  33,  34,  35,  36,  37,  48,  49,  50,  51,  52,  65,  66,  67,  68,  69
81,  82,  83,  84,  85,  96,  97,  98,  99, 100, 111, 112, 113, 114, 115, 116
126, 127, 128, 129, 130, 141, 142, 143, 144, 145, 155, 156, 157, 158, 159, 160
186, 189, 194, 195, 196, 204, 205, 206, 207, 208, 209, 217, 218, 219, 221, 226
230, 231, 232, 233, 239, 248, 250, 252, 253, 254, 255, 260, 261, 262, 263, 264
271, 272, 274, 275, 276, 283, 284, 285, 286, 291, 296, 297, 298, 299, 300
*Nset, nset=_PickedSet222, internal, generate
32,  33,  34,  35,  36,  37,  48,  49,  50,  51,  52,  65,  66,  67,  68,  69
81,  82,  83,  84,  85,  96,  97,  98,  99, 100, 111, 112, 113, 114, 115, 116
126, 127, 128, 129, 130, 141, 142, 143, 144, 145, 155, 156, 157, 158, 159, 160
186, 189, 194, 195, 196, 204, 205, 206, 207, 208, 209, 217, 218, 219, 221, 226
230, 231, 232, 233, 239, 248, 250, 252, 253, 254, 255, 260, 261, 262, 263, 264
271, 272, 274, 275, 276, 283, 284, 285, 286, 291, 296, 297, 298, 299, 300
*Nset, nset=_PickedSet222, internal, generate
32,  33,  34,  35,  36,  37,  48,  49,  50,  51,  52,  65,  66,  67,  68,  69
81,  82,  83,  84,  85,  96,  97,  98,  99, 100, 111, 112, 113, 114, 115, 116
126, 127, 128, 129, 130, 141, 142, 143, 144, 145, 155, 156, 157, 158, 159, 160
186, 189, 194, 195, 196, 204, 205, 206, 207, 208, 209, 217, 218, 219, 221, 226
230, 231, 232, 233, 239, 248, 250, 252, 253, 254, 255, 260, 261, 262, 263, 264
271, 272, 274, 275, 276, 283, 284, 285, 286, 291, 296, 297, 298, 299, 300
*Nset, nset=_PickedSet13, internal, generate
1,  309,    1
*Elset, elset=_PickedSet13, internal, generate
1,  277,    1
*Nset, nset=_PickedSet33, internal
19,  20,  21,  22,  23,  24
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*Elset, elset=_PickedSet33, internal, generate
257,  277,    1
*Nset, nset=_PickedSet34, internal
1,   2,   3,   4,   5,   6
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*Elset, elset=_PickedSet34, internal, generate
1,  256,    1
** Section: AWP
*Shell Section, elset=_PickedSet222, material=Scar_tissue
2., 5
** Section: AWP
*Shell Section, elset=_PickedSet222, material=MATERIAL
2., 5
** Section: AWP
*Shell Section, elset=_PickedSet222material=MATERIAL
2., 5
** Section: AWP
*Shell Section, elset=_PickedSet222,
material=ATFP_HYPER_highdesity
2., 5
** Section: AWP
*Shell Section, elset=_PickedSet34, material=AVW_HYPER_Analog, offset=SPOS
2., 5
** Section: AWP_dis
*Shell Section, elset=_PickedSet33, material=ATFP_HYPER_highdesity
2., 5
*Nonstructural Mass, elset=_PickedSet13, units=TOTAL MASS
0.02,
*End Part
**
*Part, name=OPAL325_CL_v6
*Node
1,   -23.477602,   -9.2332077,   13.4487724
2,  -51.6031265,  -20.0011997,          66.
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*Element, type=T3D2
1,   1,  25
2,  25,  26
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*Nset, nset=_PickedSet4, internal, generate
1,  24,   1
*Nset, nset=_PickedSet5, internal, generate
1,  1590,     1
*Elset, elset=_PickedSet5, internal, generate
1,  1578,     1
** Section: CL-wire
*Solid Section, elset=_PickedSet5, material=CL_Analog
1.,
*Element, type=ROTARYI, elset=_PickedSet4_Inertia-1_
1579, 1
1580, 2
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*Rotary Inertia, elset=_PickedSet4_Inertia-1_
0.0001, 0.0001, 0.0001, 0., 0., 0.
*End Part
**
*Part, name=OPAL325_GIfiller
*Node
1,  -7.93228674,   -35.195816,  -27.0964336
2,  -16.4990864,  -17.8722572,    -28.77948
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*Element, type=C3D4
1,  986,  987,  988,  989
2,  989,  987,  990,  986
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*Nset, nset=_PickedSet5, internal, generate
1,  2323,     1
*Elset, elset=_PickedSet5, internal, generate
1,  10778,      1
*Nset, nset=_PickedSet6, internal, generate
1,  2323,     1
*Elset, elset=_PickedSet6, internal, generate
1,  10778,      1
** Section: VAGFiller
*Solid Section, elset=_PickedSet6, material="AVW_HYPER20_low density"
1.,
*Nonstructural Mass, elset=_PickedSet5, units=TOTAL MASS
0.2,
*End Part
**
*Part, name=OPAL325_LA
*Node
1,  -5.21423531,  -34.8066177,  -8.37701321
2,   26.6834011,   17.5060616,  -19.2220497
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*Element, type=S3
1, 457, 383, 384
2, 459, 360, 407
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*Element, type=S4R
4, 332, 338, 339, 333
5, 338, 351, 352, 339
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*Nset, nset=_PickedSet44, internal
1,    7,   10,   11,   12,   13
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*Elset, elset=_PickedSet44, internal
513,  514,  515,  516,  517,  518
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*Nset, nset=_PickedSet45, internal
1,    2,    6,    7,   10,   11
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*Elset, elset=_PickedSet45, internal
356,  357,  358,  359,  360,  361
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*Nset, nset=_PickedSet46, internal
1,   2,   3,   4,   5,   6
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*Elset, elset=_PickedSet46, internal, generate
1,  355,    1
*Nset, nset=_PickedSet47, internal, generate
1,  2082,     1
*Elset, elset=_PickedSet47, internal, generate
1,  2021,     1
** Section: PRMPCM
*Shell Section, elset=_PickedSet46, material=PCM_Hyper_Analog
6., 5
** Section: PCM
*Shell Section, elset=_PickedSet45, material=PCM_Hyper_Analog
4., 5
** Section: ICM
*Shell Section, elset=_PickedSet44, material=PCM_HYPER100
2., 5
*Nonstructural Mass, elset=_PickedSet47, units=MASS PER VOLUME
1.1e-06,
*End Part
**
*Part, name=OPAL325_PBody
*Node
1,  -18.7304707,  -9.75341606,   -27.259222
2,  -16.7986488,   -9.4432888,  -27.4684525
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*Element, type=S3R
1,  79,  80,  73
2, 164, 165, 149
*Element, type=S4R
3, 150, 157, 139, 137
4,  47, 157, 150,  46
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*Nset, nset=_PickedSet5, internal, generate
1,  172,    1
*Elset, elset=_PickedSet5, internal, generate
1,  146,    1
** Section: PBody
*Shell Section, elset=_PickedSet5, material=PARAVAG_H_highdensity
2., 5
*End Part
**
*Part, name=OPAL325_PM_mid
*Node
1,  -57.4698143,   -11.551424,  -26.3191147
2,  -55.7928543,  -9.70529842,  -26.0462055
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*Element, type=S3R
1, 273, 272, 274
2, 244, 246, 234
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*Element, type=S4R
14,   2, 320, 349,   1
15, 120,  52,   1, 349
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*Nset, nset=_PickedSet5, internal, generate
1,  392,    1
*Elset, elset=_PickedSet5, internal, generate
1,  337,    1
** Section: PBody
*Shell Section, elset=_PickedSet5, material=PARAVAG_H_highdensity
2., 5
*End Part
**
*Part, name=OPAL325_Para_v6
*Node
1,  -25.8009739,   11.8042965,  -22.4799175
2,   -20.843029, -0.473626733,  -6.08968401
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*Element, type=T3D2
1,  1, 18
2, 18, 19
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*Nset, nset=_PickedSet4, internal, generate
1,  17,   1
*Nset, nset=_PickedSet13, internal
1,   2,   3,   6,   7,   8
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*Elset, elset=_PickedSet13, internal
1,   2,   3,   4,   5,   6
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*Nset, nset=_PickedSet14, internal
1,   3,   4,   5,   7,  12
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*Elset, elset=_PickedSet14, internal
43,  44,  45,  46,  47,  48
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** Section: Para-wire
*Solid Section, elset=_PickedSet13, material=PARAVAG_H_Analog
1.,
** Section: Para-wire-high
*Solid Section, elset=_PickedSet14, material=ATFP_HYPER
1.,
*Element, type=ROTARYI, elset=_PickedSet4_Inertia-1_
333, 1
334, 2
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*Rotary Inertia, elset=_PickedSet4_Inertia-1_
0.0001, 0.0001, 0.0001, 0., 0., 0.
*End Part
**
*Part, name=OPAL325_RefPlane_MirrorN_0318_20
*Node
1,  -59.0958939,  -16.6977406,  -27.1417942
2,   45.8929558,  -16.6977406,  -29.2732258
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*Element, type=S4R
1, 26, 50, 51, 25
2, 42, 50,  5,  6
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*End Part
**
*Part, name=OPAL325_US_v6
*Node
1,  -23.3392544,  -9.19381237,   13.4449682
2,  -42.9855118,  -48.8706436,   30.1705265
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*Element, type=T3D2
1,   1,  13
2,  13,  14
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*Nset, nset=_PickedSet4, internal, generate
1,  12,   1
*Nset, nset=_PickedSet5, internal, generate
1,  567,    1
*Elset, elset=_PickedSet5, internal, generate
1,  561,    1
** Section: US-wire
*Solid Section, elset=_PickedSet5, material=US_Analog
1.,
*Element, type=ROTARYI, elset=_PickedSet4_Inertia-1_
562, 1
563, 2
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*Rotary Inertia, elset=_PickedSet4_Inertia-1_
0.0001, 0.0001, 0.0001, 0., 0., 0.
*End Part
**
**
** ASSEMBLY
**
*Assembly, name=Assembly
**
*Instance, name=OPAL325_ATFP-1, part=OPAL325_ATFP
*End Instance
**
*Instance, name=OPAL325_GIfiller-1, part=OPAL325_GIfiller
*End Instance
**
*Instance, name=OPAL325_LA-1, part=OPAL325_LA
*End Instance
**
*Instance, name=OPAL325_ATLA-1, part=OPAL325_ATLA
*End Instance
**
*Instance, name=OPAL325_CL_v6-1, part=OPAL325_CL_v6
*End Instance
**
*Instance, name=OPAL325_Para_v6-1, part=OPAL325_Para_v6
*End Instance
**
*Instance, name=OPAL325_AVW_v6-1, part=OPAL325_AVW_v6
*End Instance
**
*Instance, name=OPAL325_US_v6-1, part=OPAL325_US_v6
*End Instance
**
*Instance, name=OPAL325_PBody-1, part=OPAL325_PBody
*End Instance
**
*Instance, name=OPAL325_PM_mid-1, part=OPAL325_PM_mid
*End Instance
**
**Instance, name=OPAL325_RefPlane_MirrorN_0318_20-1, part=OPAL325_RefPlane_MirrorN_0318_20
**End Instance
**
*Element, type=CONN3D2
1, OPAL325_AVW_v6-1.11, OPAL325_Para_v6-1.8
2, OPAL325_AVW_v6-1.12, OPAL325_Para_v6-1.2
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*Connector Section, elset=Wire-1-Set-1
Weld,
*Element, type=CONN3D2
13, OPAL325_AVW_v6-1.2, OPAL325_CL_v6-1.1
14, OPAL325_AVW_v6-1.5, OPAL325_CL_v6-1.16
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*Connector Section, elset=Wire-2-Set-1
Weld,
*Nset, nset=Wire-1-Set-1, instance=OPAL325_AVW_v6-1
11, 12, 13, 14, 15, 16, 17, 18, 19, 20, 21, 26
*Nset, nset=Wire-1-Set-1, instance=OPAL325_Para_v6-1
2,  4,  5,  6,  8,  9, 10, 11, 12, 13, 15, 17
*Elset, elset=Wire-1-Set-1, generate
1,  12,   1
*Nset, nset=Wire-2-Set-1, instance=OPAL325_AVW_v6-1, generate
1,  12,   1
*Nset, nset=Wire-2-Set-1, instance=OPAL325_CL_v6-1
1,  3,  5,  8, 10, 12, 14, 16, 18, 19, 21, 23
*Nset, nset=Wire-2-Set-1, instance=OPAL325_US_v6-1, generate
1,  11,   2
*Elset, elset=Wire-2-Set-1, generate
13,  30,   1
*Nset, nset=_PickedSet487, internal, instance=OPAL325_ATFP-1
2, 4
*Nset, nset=_PickedSet487, internal, instance=OPAL325_ATLA-1
2, 4
*Nset, nset=_PickedSet542, internal, instance=OPAL325_CL_v6-1
2,  4,  6,  7,  9, 11, 13, 15, 17, 20, 22, 24
*Nset, nset=_PickedSet542, internal, instance=OPAL325_US_v6-1, generate
2,  12,   2
*Nset, nset=_PickedSet545, internal, instance=OPAL325_ATFP-1
1, 3
*Nset, nset=_PickedSet545, internal, instance=OPAL325_Para_v6-1
1,  3,  7, 14, 16
*Elset, elset=_PickedSet545, internal, instance=OPAL325_Para_v6-1
43, 308
*Nset, nset=_PickedSet586, internal, instance=OPAL325_ATLA-1, generate
1,  4,  1
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*Nset, nset=_PickedSet646, internal, instance=OPAL325_ATLA-1
1,    2,    5,    6,    7,    8
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*Elset, elset=_PickedSet646, internal, instance=OPAL325_ATLA-1, generate
1,  1377,     1
*Nset, nset=_PickedSet661, internal, instance=OPAL325_ATLA-1
3,    4, 1381, 1382, 1383, 1384
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*Elset, elset=_PickedSet661, internal, instance=OPAL325_ATLA-1, generate
1378,  2754,     1
*Nset, nset=_PickedSet671, internal, instance=OPAL325_PM_mid-1, generate
1,  53,   1
*Elset, elset=_PickedSet671, internal, instance=OPAL325_PM_mid-1
14,  15,  40,  49,  53,  54
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*Nset, nset=_PickedSet680, internal, instance=OPAL325_PBody-1
20,  21,  22,  23,  24,  25, 140, 141, 142, 143, 144
*Nset, nset=_PickedSet680, internal, instance=OPAL325_PM_mid-1, generate
101,  105,    1
*Elset, elset=_PickedSet680, internal, instance=OPAL325_PBody-1
46,  49,  59,  60,  61,  62,  65, 108, 114, 115
*Elset, elset=_PickedSet680, internal, instance=OPAL325_PM_mid-1
247, 251, 253, 312
*Nset, nset=_PickedSet681, internal, instance=OPAL325_LA-1
3,   4,   8,   9,  52,  53
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*Elset, elset=_PickedSet681, internal, instance=OPAL325_LA-1
31,  33,  34,  87,  91,  94, 141, 143, 153, 207, 208, 210, 211, 212, 239, 333
*Nset, nset=_PickedSet684, internal, instance=OPAL325_LA-1
12,  13,  14, 220, 221, 222
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*Elset, elset=_PickedSet684, internal, instance=OPAL325_LA-1
564,  566,  626,  659,  661,  668
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*Nset, nset=_PickedSet685, internal, instance=OPAL325_LA-1
2,   6,  10,  11, 151, 152
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*Elset, elset=__PickedSurf544_SPOS, internal, instance=OPAL325_AVW_v6-1, generate
1,  277,    1
*Surface, type=ELEMENT, name=_PickedSurf544, internal
__PickedSurf544_SPOS, SPOS
*Elset, elset=__PickedSurf555_SNEG, internal, instance=OPAL325_AVW_v6-1, generate
1,  277,    1
*Surface, type=ELEMENT, name=_PickedSurf555, internal
__PickedSurf555_SNEG, SNEG
*Elset, elset=__PickedSurf560_SPOS, internal, instance=OPAL325_AVW_v6-1, generate
1,  277,    1
*Surface, type=ELEMENT, name=_PickedSurf560, internal
__PickedSurf560_SPOS, SPOS
*Elset, elset=__PickedSurf568_S3, internal, instance=OPAL325_GIfiller-1
87,   206,   335,   353,   445,   654
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*Elset, elset=__PickedSurf568_S1, internal, instance=OPAL325_GIfiller-1
145,  747, 2172, 2659, 2780, 2974
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*Elset, elset=__PickedSurf568_S4, internal, instance=OPAL325_GIfiller-1
728,  1789,  2106,  2576,  2835,  3033
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*Elset, elset=__PickedSurf568_S2, internal, instance=OPAL325_GIfiller-1
1749,  2010,  2294,  2321,  2433,  2824
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*Surface, type=ELEMENT, name=_PickedSurf568, internal
__PickedSurf568_S3, S3
__PickedSurf568_S1, S1
__PickedSurf568_S4, S4
__PickedSurf568_S2, S2
*Elset, elset=__PickedSurf653_S3, internal, instance=OPAL325_GIfiller-1
78,  1554,  1572,  1582,  1633,  1653
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*Elset, elset=__PickedSurf653_S4, internal, instance=OPAL325_GIfiller-1
747,  1429,  1905,  1929,  1950,  2518
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*Elset, elset=__PickedSurf653_S1, internal, instance=OPAL325_GIfiller-1
1558, 1559, 1789, 2732, 3033, 3368, 5449, 7429, 8661, 9277
*Elset, elset=__PickedSurf653_S2, internal, instance=OPAL325_GIfiller-1
1771, 1939, 4168, 4350, 4396, 5202, 5335, 5956, 5988, 5991, 6076, 6314, 6360, 7570
*Surface, type=ELEMENT, name=_PickedSurf653, internal
__PickedSurf653_S3, S3
__PickedSurf653_S4, S4
__PickedSurf653_S2, S2
__PickedSurf653_S1, S1
*Elset, elset=__PickedSurf659_SNEG, internal, instance=OPAL325_PBody-1, generate
1,  146,    1
*Surface, type=ELEMENT, name=_PickedSurf659, internal
__PickedSurf659_SNEG, SNEG
*Elset, elset=__PickedSurf675_SNEG, internal, instance=OPAL325_PM_mid-1, generate
1,  337,    1
*Surface, type=ELEMENT, name=_PickedSurf675, internal
__PickedSurf675_SNEG, SNEG
*Elset, elset=__PickedSurf677_SPOS, internal, instance=OPAL325_PBody-1, generate
1,  146,    1
*Elset, elset=__PickedSurf677_SNEG, internal, instance=OPAL325_PBody-1, generate
1,  146,    1
*Surface, type=ELEMENT, name=_PickedSurf677, internal
__PickedSurf677_SPOS, SPOS
__PickedSurf677_SNEG, SNEG
*Elset, elset=__PickedSurf679_SPOS, internal, instance=OPAL325_PBody-1, generate
1,  146,    1
*Elset, elset=__PickedSurf679_SNEG, internal, instance=OPAL325_PBody-1, generate
1,  146,    1
*Surface, type=ELEMENT, name=_PickedSurf679, internal
__PickedSurf679_SPOS, SPOS
__PickedSurf679_SNEG, SNEG
*Elset, elset=__PickedSurf682_SNEG, internal, instance=OPAL325_LA-1, generate
513,  1200,     1
*Surface, type=ELEMENT, name=_PickedSurf682, internal
__PickedSurf682_SNEG, SNEG
*Elset, elset=__PickedSurf683_SNEG, internal, instance=OPAL325_LA-1, generate
1337,  2021,     1
*Surface, type=ELEMENT, name=_PickedSurf683, internal
__PickedSurf683_SNEG, SNEG
*Elset, elset=__PickedSurf688_S3, internal, instance=OPAL325_GIfiller-1
85,    87,   206,   335,   353,   445
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*Elset, elset=__PickedSurf688_S1, internal, instance=OPAL325_GIfiller-1
145,  747, 1648, 1905, 2172, 2520
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*Elset, elset=__PickedSurf688_S4, internal, instance=OPAL325_GIfiller-1
728,  1257,  1558,  1699,  1789,  1914
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*Elset, elset=__PickedSurf688_S2, internal, instance=OPAL325_GIfiller-1
1559,  1598,  1749,  1852,  2010,  2294
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*Surface, type=ELEMENT, name=_PickedSurf688, internal
__PickedSurf688_S3, S3
__PickedSurf688_S1, S1
__PickedSurf688_S4, S4
__PickedSurf688_S2, S2
*Elset, elset=__PickedSurf689_SPOS, internal, instance=OPAL325_LA-1, generate
1,  2021,     1
*Surface, type=ELEMENT, name=_PickedSurf689, internal
__PickedSurf689_SPOS, SPOS
*Surface, type=NODE, name=_PickedSet661_CNS_, internal
_PickedSet661, 1.
*Surface, type=NODE, name=_PickedSet646_CNS_, internal
_PickedSet646, 1.
*Surface, type=NODE, name=_PickedSet681_CNS_, internal
_PickedSet681, 1.
*Surface, type=NODE, name=_PickedSet680_CNS_, internal
_PickedSet680, 1.
*Orientation, name="Datum csys-1"
1.,           0.,           0.,           0.,           1.,           0.
1, 0.
** Constraint: ATLA-N_LA-tie
*Tie, name=ATLA-N_LA-tie, adjust=no, position tolerance=4., type=NODE TO SURFACE, no thickness
_PickedSet661_CNS_, _PickedSurf683
** Constraint: ATLA_D_LA-tie
*Tie, name=ATLA_D_LA-tie, adjust=no, position tolerance=4., type=NODE TO SURFACE, no thickness
_PickedSet646_CNS_, _PickedSurf682
** Constraint: PBody-LA-Tie
*Tie, name=PBody-LA-Tie, adjust=no, position tolerance=40., type=NODE TO SURFACE, no thickness
_PickedSet681_CNS_, _PickedSurf677
** Constraint: PM-PBody
*Tie, name=PM-PBody, adjust=no, position tolerance=40., type=NODE TO SURFACE, no thickness
_PickedSet680_CNS_, _PickedSurf679
** Constraint: RefPane
**Display Body, instance=OPAL325_RefPlane_MirrorN_0318_20-1
*End Assembly
*Amplitude, name=AMP-1, definition=SMOOTH STEP
0.,              0.,             0.1,            0.33,             0.2,            0.61,             0.3,            0.83
0.4,            0.96,             0.5,              1.
*Amplitude, name=AMP-2, time=TOTAL TIME
0.,              0.,            0.05,            0.08,             0.1,            0.15,            0.15,            0.23
0.2,             0.3,            0.25,            0.38,             0.3,            0.45,            0.35,            0.52
0.4,            0.58,            0.45,            0.64,             0.5,             0.7,            0.55,            0.76
0.6,             0.8,            0.65,            0.85,             0.7,            0.89,            0.75,            0.92
0.8,            0.95,            0.85,            0.97,             0.9,            0.99,              1.,              1.
*Amplitude, name=AMP-3
0.,              0.,           0.025,            0.08,            0.05,            0.15,           0.075,            0.23
0.1,             0.3,           0.125,            0.38,            0.15,            0.45,           0.175,            0.52
0.2,            0.58,           0.225,            0.64,            0.25,             0.7,           0.275,            0.76
0.3,             0.8,           0.325,            0.85,            0.35,            0.89,           0.375,            0.92
0.4,            0.95,           0.425,            0.97,            0.45,            0.99,             0.5,              1.
*Amplitude, name=AMP-4
0.,              0.,          0.0125,            0.08,           0.025,            0.15,          0.0375,            0.23
0.05,             0.3,          0.0625,            0.38,           0.075,            0.45,          0.0875,            0.52
0.1,            0.58,          0.1125,            0.64,           0.125,             0.7,          0.1375,            0.76
0.15,             0.8,          0.1625,            0.85,           0.175,            0.89,          0.1875,            0.92
0.2,            0.95,          0.2125,            0.97,           0.225,            0.99,            0.25,              1.
*Amplitude, name="active contraction"
0.,              0.,            0.05,              0.,             0.1,              0.,            0.15,              0.
0.2,              0.,            0.25,              0.,             0.3,              0.,            0.35,              0.
0.4,              0.,            0.45,              0.,             0.5,              0.,            0.55,            0.76
0.6,             0.8,            0.65,            0.85,             0.7,            0.89,            0.75,            0.92
0.8,            0.95,            0.85,            0.97,             0.9,            0.99,              1.,              1.
*Amplitude, name="active contraction-all time"
0.,              0.,            0.05,            0.08,             0.1,            0.15,            0.15,            0.23
0.2,             0.3,            0.25,            0.38,             0.3,            0.45,            0.35,            0.52
0.4,            0.58,            0.45,            0.64,             0.5,             0.7,            0.55,            0.76
0.6,             0.8,            0.65,            0.85,             0.7,            0.89,            0.75,            0.92
0.8,            0.95,            0.85,            0.97,             0.9,            0.99,              1.,              1.
*Amplitude, name="smooth step", definition=SMOOTH STEP
0.,              0.,            0.05,            0.08,             0.1,            0.15,            0.15,            0.23
0.2,             0.3,            0.25,            0.38,             0.3,            0.45,            0.35,            0.52
0.4,            0.58,            0.45,            0.64,             0.5,             0.7,            0.55,            0.76
0.6,             0.8,            0.65,            0.85,             0.7,            0.89,            0.75,            0.92
0.8,            0.95,            0.85,            0.97,             0.9,            0.99,              1.,              1.
**
** MATERIALS
**
*Material, name=ATFP_HYPER
*Density
1.1e-05,
*Hyperelastic, n=2, test data input
*Uniaxial Test Data
1.38501, 0.1
3.18666, 0.2
5.5303, 0.3
8.57895, 0.4
12.5448, 0.5
17.7036, 0.6
24.4143, 0.7
33.1437, 0.8
44.4993, 0.9
59.271,  1.
*Material, name=ATFP_HYPER_highdesity
*Density
0.00011,
*Hyperelastic, n=2, test data input
*Uniaxial Test Data
1.38501, 0.1
3.18666, 0.2
5.5303, 0.3
8.57895, 0.4
12.5448, 0.5
17.7036, 0.6
24.4143, 0.7
33.1437, 0.8
44.4993, 0.9
59.271,  1.
*Material, name=AVW_HYPER
*Density
1.1e-06,
*Hyperelastic, n=2, test data input
*Uniaxial Test Data
0.0138501, 0.1
0.0318666, 0.2
0.055303, 0.3
0.0857897, 0.4
0.125448, 0.5
0.177036, 0.6
0.244143, 0.7
0.331437, 0.8
0.444993, 0.9
0.592708,  1.
*Material, name=AVW_HYPER20
*Density
1.1e-06,
*Hyperelastic, n=2, test data input
*Uniaxial Test Data
0.00138501, 0.1
0.00318666, 0.2
0.0055303, 0.3
0.00857897, 0.4
0.0125448, 0.5
0.0177036, 0.6
0.0244143, 0.7
0.0331437, 0.8
0.0444993, 0.9
0.0592708,  1.
*Material, name="AVW_HYPER20_low density"
*Density
1.1e-07,
*Hyperelastic, n=2, test data input
*Uniaxial Test Data
0.00138501, 0.1
0.00318666, 0.2
0.0055303, 0.3
0.00857897, 0.4
0.0125448, 0.5
0.0177036, 0.6
0.0244143, 0.7
0.0331437, 0.8
0.0444993, 0.9
0.0592708,  1.
*Material, name=AVW_HYPER_200
*Density
1.1e-06,
*Hyperelastic, n=2, test data input
*Uniaxial Test Data
0.0277002, 0.1
0.0637332, 0.2
0.110606, 0.3
0.171579, 0.4
0.250896, 0.5
0.354072, 0.6
0.488286, 0.7
0.662874, 0.8
0.889986, 0.9
1.18542,  1.
*Material, name=CLPara_H100
*Density
9e-10,
*Hyperelastic, n=2, test data input
*Uniaxial Test Data
0.00268578,  0.1
0.0055405,  0.2
0.00857477,  0.3
0.0117999,  0.4
0.0152279,  0.5
0.0188715,  0.6
0.0227443,  0.7
0.0268606,  0.8
0.0312359,  0.9
0.0358864,   1.
1e-05, -0.1
1e-05, -0.2
1e-05, -0.3
1e-05, -0.4
1e-05, -0.5
1e-05, -0.6
1e-05, -0.7
1e-05, -0.8
1e-05, -0.9
*Material, name=CLUS_H1
*Density
9e-07,
*Hyperelastic, n=2, test data input
*Uniaxial Test Data
2.68578e-05,  0.1
5.5405e-05,  0.2
8.57477e-05,  0.3
0.000117999,  0.4
0.000152279,  0.5
0.000188715,  0.6
0.000227443,  0.7
0.000268606,  0.8
0.000312359,  0.9
0.000358864,   1.
-1e-06, -0.1
-1e-06, -0.2
-1e-06, -0.3
-1e-06, -0.4
-1e-06, -0.5
-1e-06, -0.6
-1e-06, -0.7
-1e-06, -0.8
-1e-06, -0.9
*Material, name=CLUS_H5
*Density
9e-07,
*Hyperelastic, n=2, test data input
*Uniaxial Test Data
0.000134289, 0.1
0.000277025, 0.2
0.000428739, 0.3
0.000589995, 0.4
0.000761395, 0.5
0.000943575, 0.6
0.00113722, 0.7
0.00134303, 0.8
0.00156179, 0.9
0.00179432,  1.
*Material, name=CLUS_H10
*Density
9e-07,
*Hyperelastic, n=2, test data input
*Uniaxial Test Data
0.000268578,  0.1
0.00055405,  0.2
0.000857477,  0.3
0.00117999,  0.4
0.00152279,  0.5
0.00188715,  0.6
0.00227443,  0.7
0.00268606,  0.8
0.00312359,  0.9
0.00358864,   1.
1e-05, -0.1
1e-05, -0.2
1e-05, -0.3
1e-05, -0.4
1e-05, -0.5
1e-05, -0.6
1e-05, -0.7
1e-05, -0.8
1e-05, -0.9
*Material, name=CLUS_H50
*Density
9e-07,
*Hyperelastic, n=2, test data input
*Uniaxial Test Data
0.00134289, 0.1
0.00277025, 0.2
0.00428739, 0.3
0.00589995, 0.4
0.00761395, 0.5
0.00943575, 0.6
0.0113721, 0.7
0.0134303, 0.8
0.015618, 0.9
0.0179432,  1.
*Material, name=CLUS_H100
*Density
9e-07,
*Hyperelastic, n=2, test data input
*Uniaxial Test Data
0.00268578,  0.1
0.0055405,  0.2
0.00857477,  0.3
0.0117999,  0.4
0.0152279,  0.5
0.0188715,  0.6
0.0227443,  0.7
0.0268606,  0.8
0.0312359,  0.9
0.0358864,   1.
1e-05, -0.1
1e-05, -0.2
1e-05, -0.3
1e-05, -0.4
1e-05, -0.5
1e-05, -0.6
1e-05, -0.7
1e-05, -0.8
1e-05, -0.9
*Material, name=CLpara_H10
*Density
9e-07,
*Hyperelastic, n=2, test data input
*Uniaxial Test Data
0.000134289,  0.1
0.000277025,  0.2
0.000428739,  0.3
0.000589995,  0.4
0.000761395,  0.5
0.000943575,  0.6
0.00113722,  0.7
0.00134303,  0.8
0.00156179,  0.9
0.00179432,   1.
1e-05, -0.1
1e-05, -0.2
1e-05, -0.3
1e-05, -0.4
1e-05, -0.5
1e-05, -0.6
1e-05, -0.7
1e-05, -0.8
1e-05, -0.9
*Material, name=PARAVAG_H
*Density
9e-07,
*Hyperelastic, n=2, test data input
*Uniaxial Test Data
0.00268578,  0.1
0.000268578,  0.2
0.00055405,  0.3
0.000857478,  0.4
0.00117999,  0.5
0.00152279,  0.6
0.00188715,  0.7
0.00227443,  0.8
0.00268606,  0.9
0.00312359,   1.
1e-05, -0.1
1e-05, -0.2
1e-05, -0.3
1e-05, -0.4
1e-05, -0.5
1e-05, -0.6
1e-05, -0.7
1e-05, -0.8
1e-05, -0.9
*Material, name=PARAVAG_H_highdensity
*Density
9e-07,
*Hyperelastic, n=2, test data input
*Uniaxial Test Data
0.0268578, 0.1
0.00268578, 0.2
0.0055405, 0.3
0.00857478, 0.4
0.0117999, 0.5
0.0152279, 0.6
0.0188715, 0.7
0.0227443, 0.8
0.0268606, 0.9
0.0312359,  1.
*Material, name=PARAVAG_H_lowdenstiy
*Density
9e-09,
*Hyperelastic, n=2, test data input
*Uniaxial Test Data
0.00268578,  0.1
0.000268578,  0.2
0.00055405,  0.3
0.000857478,  0.4
0.00117999,  0.5
0.00152279,  0.6
0.00188715,  0.7
0.00227443,  0.8
0.00268606,  0.9
0.00312359,   1.
1e-05, -0.1
1e-05, -0.2
1e-05, -0.3
1e-05, -0.4
1e-05, -0.5
1e-05, -0.6
1e-05, -0.7
1e-05, -0.8
1e-05, -0.9
*Material, name=PCM_HYPER10
*Density
1.1e-06,
*Hyperelastic, n=2, test data input
*Uniaxial Test Data
0.0014, 0.1
0.0032, 0.2
0.0055, 0.3
0.0086, 0.4
0.0125, 0.5
0.0177, 0.6
0.0244, 0.7
0.0331, 0.8
0.0445, 0.9
0.06,  1.
*Material, name=PCM_HYPER20
*Density
1.1e-06,
*Hyperelastic, n=2, test data input
*Uniaxial Test Data
0.00277002, 0.1
0.00637332, 0.2
0.0110606, 0.3
0.0171579, 0.4
0.0250896, 0.5
0.0354072, 0.6
0.0488286, 0.7
0.0662874, 0.8
0.0889986, 0.9
0.118542,  1.
*Material, name=PCM_HYPER40
*Density
1.1e-06,
*Hyperelastic, n=2, test data input
*Uniaxial Test Data
0.00554004, 0.1
0.0127466, 0.2
0.0221212, 0.3
0.0343159, 0.4
0.0501792, 0.5
0.0708144, 0.6
0.0976572, 0.7
0.132575, 0.8
0.177997, 0.9
0.237083,  1.
*Material, name=PCM_HYPER60
*Density
1.1e-06,
*Hyperelastic, n=2, test data input
*Uniaxial Test Data
0.00831006, 0.1
0.01912, 0.2
0.0331818, 0.3
0.0514738, 0.4
0.0752688, 0.5
0.106222, 0.6
0.146486, 0.7
0.198862, 0.8
0.266996, 0.9
0.355625,  1.
*Material, name=PCM_HYPER80
*Density
1.1e-06,
*Hyperelastic, n=2, test data input
*Uniaxial Test Data
0.0110801, 0.1
0.0254933, 0.2
0.0442424, 0.3
0.0686318, 0.4
0.100358, 0.5
0.141629, 0.6
0.195314, 0.7
0.26515, 0.8
0.355994, 0.9
0.474166,  1.
*Material, name=PCM_HYPER100
*Density
1.1e-06,
*Hyperelastic, n=2, test data input
*Uniaxial Test Data
0.0138501, 0.1
0.0318666, 0.2
0.055303, 0.3
0.0857897, 0.4
0.125448, 0.5
0.177036, 0.6
0.244143, 0.7
0.331437, 0.8
0.444993, 0.9
0.592708,  1.
*Material, name=PCM_HYPER300
*Density
1.1e-06,
*Hyperelastic, n=2, test data input
*Uniaxial Test Data
0.0415503, 0.1
0.0955998, 0.2
0.165909, 0.3
0.257369, 0.4
0.376344, 0.5
0.531108, 0.6
0.732429, 0.7
0.994311, 0.8
1.33498, 0.9
1.77812,  1.
**
** INTERACTION PROPERTIES
**
*Surface Interaction, name=Penalty
*Friction
1.,
*Surface Interaction, name=frictionless
*Friction
0.,
*Surface Interaction, name=rough
*Friction, rough
**
** BOUNDARY CONDITIONS
**
** Name: ATFP_Fix Type: Symmetry/Antisymmetry/Encastre
*Boundary
_PickedSet545, PINNED
** Name: ATFPbackends Type: Symmetry/Antisymmetry/Encastre
*Boundary
_PickedSet487, PINNED
** Name: ATLA_Fix Type: Symmetry/Antisymmetry/Encastre
*Boundary
_PickedSet586, PINNED
** Name: CL&US Type: Symmetry/Antisymmetry/Encastre
*Boundary
_PickedSet542, PINNED
** Name: LA-PBfix Type: Symmetry/Antisymmetry/Encastre
*Boundary
_PickedSet685, PINNED
** Name: LAposterior Type: Symmetry/Antisymmetry/Encastre
*Boundary
_PickedSet684, PINNED
** Name: PM Type: Displacement/Rotation
*Boundary
_PickedSet671, 1, 1
_PickedSet671, 2, 2
_PickedSet671, 3, 3
_PickedSet671, 4, 4
_PickedSet671, 5, 5
_PickedSet671, 6, 6
**
** INTERACTIONS
**
** Interaction: Self-Contact
*Contact, op=NEW
*Contact Inclusions, ALL EXTERIOR
*Contact Property Assignment
,  , frictionless
** ----------------------------------------------------------------
**
** STEP: Step-1
**
*Step, name=Step-1, nlgeom=YES
*Dynamic, Explicit
, 1.,, 0.1
*Bulk Viscosity
0.06, 1.2
**
** LOADS
**
** Name: pressure   Type: Pressure
*Dsload, amplitude="smooth step"
_PickedSurf560, P, 0.01
** Name: traction   Type: Surface traction
*Dsload, amplitude=AMP-4, orientation="Datum csys-1"
_PickedSurf544, TRVEC, 5e-05, 0., 0., -1.
**
** INTERACTIONS
**
** Interaction: AVW-Filler-Contact
*Contact Pair, interaction=frictionless, mechanical constraint=KINEMATIC, cpset=AVW-Filler-Contact
_PickedSurf555, _PickedSurf568
** Interaction: Filler-LA-Contact
*Contact Pair, interaction=Penalty, mechanical constraint=KINEMATIC, cpset=Filler-LA-Contact
_PickedSurf689, _PickedSurf688
** Interaction: Filler-PBody
*Contact Pair, interaction=rough, mechanical constraint=KINEMATIC, cpset=Filler-PBody
_PickedSurf659, _PickedSurf653
**
** OUTPUT REQUESTS
**
*Restart, write, number interval=1, time marks=NO
**
** FIELD OUTPUT: F-Output-1
**
*Output, field, number interval=10
*Node Output
A, COORD, RF, U, V
*Element Output, directions=YES
ELEDEN, ELEN, ENER, LE, PE, PEEQ, S
*Contact Output
CSTRESS,
**
** HISTORY OUTPUT: H-Output-1
**
*Output, history, variable=PRESELECT
*End Step
